// SBML level 3 version 1

function hbt(sigma, sum_omega)
  1/(1 + exp(-sigma*sum_omega));
end

model __main()

  // Compartments:
  compartment default_compartment = 1;

  // Species:
  species C1 in default_compartment = 0.001;
  species C2 in default_compartment = 0.001;
  species C3 in default_compartment = 0.001;
  species C4 in default_compartment = 0.001;
  species E in default_compartment = 0.001;
  species D in default_compartment;
  species F in default_compartment = 0.001;
  species RPS6p in default_compartment = 0.001;

  // Parameters:
  gamma_C1 = 0.8749598;
  sigma_C1 = 2.570827;
  w_C1_O = 8.272427;
  w_C1_C3 = -9.903753;
  w_C1_C4 = -5.05055;
  w_C1_S1 = -1.145701;
  DayNight = 0;
  gamma_C2 = 9.786917;
  sigma_C2 = 4.055779;
  w_C2_O = 7.120794;
  w_C2_C1 = -9.677969;
  w_C2_C4 = -0.7320487;
  w_C2_C2 = -5.077865;
  gamma_C3 = 0.2179885;
  sigma_C3 = 6.05748;
  w_C3_O = 1.579996;
  w_C3_C4 = -1.564855;
  w_C3_C2 = -9.877621;
  w_C3_C1 = 4.465754;
  w_C3_S1 = 1.534152;
  gamma_C4 = 3.736097;
  sigma_C4 = 9.864307;
  w_C4_O = 7.345849;
  w_C4_C1 = -10;
  w_C4_C4 = -7.589766;
  avg = -1;
  t_shift = 0;
  period = 9.5;
  day = 1;
  night = 0;
  norm_avg = 0;
  gamma_E = 3.558277;
  sigma_E = 4.076018;
  w_E_O = -0.699951505;
  w_E_S1 = 9.976409;
  gamma_F = 3.318618;
  sigma_F = 8.349044;
  w_F_O = -0.838603397;
  w_F_E = 5.721142;
  gamma_RPS6 = 1.723065;
  sig_phos = 1.270006;
  w_phos = -2.156173;
  w_RPS6_F = 1.562416;
  sig_dephos = 1.194229;
  w_dephos = 6.432216;
  w_RPS6_C1 = -9.35;
  w_RPS6_C2 = 9.76734;
  w_RPS6_C3 = 4.612489;
  w_RPS6_C4 = 9.267898;

  // Reactions:
  Clock_J00: -> C1; gamma_C1*(hbt(sigma_C1, w_C1_O + w_C1_C3*C3 + w_C1_C4*C4 + w_C1_S1*DayNight) - C1);  // modifiers: C3, C4
  Clock_J01: -> C2; gamma_C2*(hbt(sigma_C2, w_C2_O + w_C2_C1*C1 + w_C2_C4*C4 + w_C2_C2*C2) - C2);  // modifiers: C1, C4
  Clock_J02: -> C3; gamma_C3*(hbt(sigma_C3, w_C3_O + w_C3_C4*C4 + w_C3_C2*C2 + w_C3_C1*C1 + w_C3_S1*DayNight) - C3);  // modifiers: C1, C2, C4
  Clock_J03: -> C4; gamma_C4*(hbt(sigma_C4, w_C4_O + w_C4_C1*C1 + w_C4_C4*C4) - C4);  // modifiers: C1
  J01: -> E; gamma_E*(hbt(sigma_E, w_E_O + w_E_S1*DayNight) - E);
  J02: -> F; gamma_F*(hbt(sigma_F, w_F_O + w_F_E*E) - F);  // modifiers: E
  J03: -> RPS6p; gamma_RPS6*(hbt(sig_phos, w_phos + w_RPS6_F*F)*(1 - RPS6p) - hbt(sig_dephos, w_dephos + w_RPS6_C1*C1 + w_RPS6_C2*C2 + w_RPS6_C3*C3 + w_RPS6_C4*C4)*RPS6p);  // modifiers: C1, C2, C3, C4, F

  // Events:
  DayNight_16_8__E0: at (avg + sin(2*pi*(time + t_shift)/period) > 0), t0=false: DayNight = day;
  DayNight_16_8__E1: at (avg + sin(2*pi*(time + t_shift)/period) <= 0), t0=false: DayNight = night;
  _E0: at (time > 9.5): DayNight = 1;
  _E1: at (time > 14.25): DayNight = 0;
  _E2: at (time > 19): avg = 0.505;
  _E3: at (time > 104.5): avg = 1;
end
